Sun Jan 21 10:58:00 PST 2024
$PROB  THEOPHYLLINE   POPULATION DATA
$INPUT      ID DOSE=AMT TIME CP=DV WT
$DATA ../THEOPP

$SUBROUTINES  ADVAN2

$PK
;THETA(1)=MEAN ABSORPTION RATE CONSTANT (1/HR)
;THETA(2)=MEAN ELIMINATION RATE CONSTANT (1/HR)
;THETA(3)=SLOPE OF CLEARANCE VS WEIGHT RELATIONSHIP (LITERS/HR/KG)
;SCALING PARAMETER=VOLUME/WT SINCE DOSE IS WEIGHT-ADJUSTED
   CALLFL=1
   KA=THETA(1)+ETA(1)
   K=THETA(2)+ETA(2)
   CL=THETA(3)*WT+ETA(3)
   SC=CL/K/WT

$THETA  (.1,3,5) (.008,.08,.5) (.004,.04,.9)
$OMEGA BLOCK(3)  6 .005 .0002 .3 .006 .4

$ERROR
   Y=F+EPS(1)

$SIGMA  .4

$EST     MAXEVAL=450  PRINT=5
;$COV
$TABLE          ID DOSE WT TIME
$SCAT           (RES WRES) VS TIME BY ID

NM-TRAN MESSAGES
 WARNINGS AND ERRORS (IF ANY) FOR PROBLEM    1
 (WARNING  2) NM-TRAN INFERS THAT THE DATA ARE POPULATION.
 (WARNING  43) THE $PK BLOCK REQUESTS "CALL ONCE PER INDIVIDUAL RECORD", BUT
 DATA ITEMS ARE USED IN THE $PK BLOCK. VALUES OF THESE DATA ITEMS
 SUBSEQUENT TO THOSE FROM THE FIRST EVENT RECORD WILL BE IGNORED.  IF THIS
 IS NOT APPROPRIATE, THE CALL DATA ITEM CAN BE USED TO OBTAIN ADDITIONAL
 CALLS, OR $PK'S CALLING PROTOCOL SHOULD BE CHANGED.
 LIM VALUES MAXLIM ASSESSED BY NMTRAN: 1,2,3,4,5,6,7,8,10,11,13,15,16
Note: Analytical 2nd Derivatives are constructed in FSUBS but are never used.
      You may insert $ABBR DERIV2=NO after the first $PROB to save FSUBS construction and compilation time

1NONLINEAR MIXED EFFECTS MODEL PROGRAM (NONMEM) VERSION 7.5.1
 ORIGINALLY DEVELOPED BY STUART BEAL, LEWIS SHEINER, AND ALISON BOECKMANN
 CURRENT DEVELOPERS ARE ROBERT BAUER, ICON DEVELOPMENT SOLUTIONS,
 AND ALISON BOECKMANN. IMPLEMENTATION, EFFICIENCY, AND STANDARDIZATION
 PERFORMED BY NOUS INFOSYSTEMS.
 PROBLEM NO.:         1
 THEOPHYLLINE   POPULATION DATA
 TOT. NO. OF OBS RECS:      132
 TOT. NO. OF INDIVIDUALS:       12
 ONE COMPARTMENT MODEL WITH FIRST-ORDER ABSORPTION (ADVAN2)
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 #TBLN:      1
 #METH: First Order
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
 #TERM:
0MINIMIZATION SUCCESSFUL
 NO. OF FUNCTION EVALUATIONS USED:      149
 NO. OF SIG. DIGITS IN FINAL EST.:  4.7

 TOTAL DATA POINTS NORMALLY DISTRIBUTED (N):          132
 N*LOG(2PI) CONSTANT TO OBJECTIVE FUNCTION:    242.59977276603360
 OBJECTIVE FUNCTION VALUE WITHOUT CONSTANT:    104.56106631146758
 OBJECTIVE FUNCTION VALUE WITH CONSTANT:       347.16083907750118
 REPORTED OBJECTIVE FUNCTION DOES NOT CONTAIN CONSTANT

 TOTAL EFFECTIVE ETAS (NIND*NETA):                            36


 #TERE:
 Elapsed estimation  time in seconds:     0.02
 Elapsed postprocess time in seconds:     0.00

 ********************                                   FIRST ORDER                                  ********************
 #OBJT:**************                       MINIMUM VALUE OF OBJECTIVE FUNCTION                      ********************
 #OBJV:********************************************      104.561       **************************************************

 ********************                                   FIRST ORDER                                  ********************
 ********************                             FINAL PARAMETER ESTIMATE                           ********************

 THETA - VECTOR OF FIXED EFFECTS PARAMETERS   *********
         TH 1      TH 2      TH 3
         2.77E+00  7.81E-02  3.63E-02

 OMEGA - COV MATRIX FOR RANDOM EFFECTS - ETAS  ********
         ETA1      ETA2      ETA3
 ETA1
+        5.55E+00
 ETA2
+        5.24E-03  2.40E-04
 ETA3
+       -1.28E-01  9.11E-03  5.15E-01

 SIGMA - COV MATRIX FOR RANDOM EFFECTS - EPSILONS  ****
         EPS1
 EPS1
+        3.88E-01

 OMEGA - CORR MATRIX FOR RANDOM EFFECTS - ETAS  *******
         ETA1      ETA2      ETA3
 ETA1
+        2.36E+00
 ETA2
+        1.44E-01  1.55E-02
 ETA3
+       -7.55E-02  8.19E-01  7.18E-01

 SIGMA - CORR MATRIX FOR RANDOM EFFECTS - EPSILONS  ***
         EPS1
 EPS1
+        6.22E-01
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 Elapsed finaloutput time in seconds:     0.01
 #CPUT: Total CPU Time in Seconds,        0.044
